<Lems>

    <!--

        This LEMS file has been automatically generated using PyNeuroML v0.3.8 (libNeuroML v0.2.37)

     -->

    <!-- Specify which component to run -->
    <Target component="Sim_M1"/>

    <!-- Include core NeuroML2 ComponentType definitions -->
    <Include file="Cells.xml"/>
    <Include file="Networks.xml"/>
    <Include file="Simulation.xml"/>

    <Include file="M1.net.nml"/>

    <Simulation id="Sim_M1" length="100ms" step="0.01ms" target="M1" seed="12345">  <!-- Note seed: ensures same random numbers used every run -->

        <Display id="DispPop__IT_L23" title="Membrane potentials of cells in IT_L23" timeScale="1ms" xmin="-10.0" xmax="110.0" ymin="-90" ymax="50">
            <Line id="IT_L23[0]: v" quantity="IT_L23/0/CELL_IT/v" scale="1mV" color="#1efd9a" timeScale="1ms"/>
            <Line id="IT_L23[1]: v" quantity="IT_L23/1/CELL_IT/v" scale="1mV" color="#5284f3" timeScale="1ms"/>
            <Line id="IT_L23[2]: v" quantity="IT_L23/2/CELL_IT/v" scale="1mV" color="#12a5b6" timeScale="1ms"/>
            <Line id="IT_L23[3]: v" quantity="IT_L23/3/CELL_IT/v" scale="1mV" color="#108b63" timeScale="1ms"/>
            <Line id="IT_L23[4]: v" quantity="IT_L23/4/CELL_IT/v" scale="1mV" color="#e24003" timeScale="1ms"/>
            <Line id="IT_L23[5]: v" quantity="IT_L23/5/CELL_IT/v" scale="1mV" color="#6dc10a" timeScale="1ms"/>
            <Line id="IT_L23[6]: v" quantity="IT_L23/6/CELL_IT/v" scale="1mV" color="#14cde8" timeScale="1ms"/>
            <Line id="IT_L23[7]: v" quantity="IT_L23/7/CELL_IT/v" scale="1mV" color="#6c2131" timeScale="1ms"/>
            <Line id="IT_L23[8]: v" quantity="IT_L23/8/CELL_IT/v" scale="1mV" color="#7ae59e" timeScale="1ms"/>
            <Line id="IT_L23[9]: v" quantity="IT_L23/9/CELL_IT/v" scale="1mV" color="#c421a7" timeScale="1ms"/>
            <Line id="IT_L23[10]: v" quantity="IT_L23/10/CELL_IT/v" scale="1mV" color="#2b5e5c" timeScale="1ms"/>
            <Line id="IT_L23[11]: v" quantity="IT_L23/11/CELL_IT/v" scale="1mV" color="#c20e1b" timeScale="1ms"/>
            <Line id="IT_L23[12]: v" quantity="IT_L23/12/CELL_IT/v" scale="1mV" color="#846ce2" timeScale="1ms"/>
            <Line id="IT_L23[13]: v" quantity="IT_L23/13/CELL_IT/v" scale="1mV" color="#b79e84" timeScale="1ms"/>
            <Line id="IT_L23[14]: v" quantity="IT_L23/14/CELL_IT/v" scale="1mV" color="#561da2" timeScale="1ms"/>
            <Line id="IT_L23[15]: v" quantity="IT_L23/15/CELL_IT/v" scale="1mV" color="#f55970" timeScale="1ms"/>
            <Line id="IT_L23[16]: v" quantity="IT_L23/16/CELL_IT/v" scale="1mV" color="#ee445e" timeScale="1ms"/>
            <Line id="IT_L23[17]: v" quantity="IT_L23/17/CELL_IT/v" scale="1mV" color="#9a0009" timeScale="1ms"/>
            <Line id="IT_L23[18]: v" quantity="IT_L23/18/CELL_IT/v" scale="1mV" color="#490467" timeScale="1ms"/>
            <Line id="IT_L23[19]: v" quantity="IT_L23/19/CELL_IT/v" scale="1mV" color="#7b47b9" timeScale="1ms"/>
            <Line id="IT_L23[20]: v" quantity="IT_L23/20/CELL_IT/v" scale="1mV" color="#7b1b3d" timeScale="1ms"/>
            <Line id="IT_L23[21]: v" quantity="IT_L23/21/CELL_IT/v" scale="1mV" color="#68707b" timeScale="1ms"/>
            <Line id="IT_L23[22]: v" quantity="IT_L23/22/CELL_IT/v" scale="1mV" color="#582271" timeScale="1ms"/>
            <Line id="IT_L23[23]: v" quantity="IT_L23/23/CELL_IT/v" scale="1mV" color="#82c119" timeScale="1ms"/>
            <Line id="IT_L23[24]: v" quantity="IT_L23/24/CELL_IT/v" scale="1mV" color="#bc002b" timeScale="1ms"/>
            <Line id="IT_L23[25]: v" quantity="IT_L23/25/CELL_IT/v" scale="1mV" color="#89fe30" timeScale="1ms"/>
            <Line id="IT_L23[26]: v" quantity="IT_L23/26/CELL_IT/v" scale="1mV" color="#bcaed1" timeScale="1ms"/>
            <Line id="IT_L23[27]: v" quantity="IT_L23/27/CELL_IT/v" scale="1mV" color="#ce1e48" timeScale="1ms"/>
            <Line id="IT_L23[28]: v" quantity="IT_L23/28/CELL_IT/v" scale="1mV" color="#f12e6c" timeScale="1ms"/>
            <Line id="IT_L23[29]: v" quantity="IT_L23/29/CELL_IT/v" scale="1mV" color="#e484f3" timeScale="1ms"/>
            <Line id="IT_L23[30]: v" quantity="IT_L23/30/CELL_IT/v" scale="1mV" color="#290257" timeScale="1ms"/>
            <Line id="IT_L23[31]: v" quantity="IT_L23/31/CELL_IT/v" scale="1mV" color="#0a87a8" timeScale="1ms"/>
            <Line id="IT_L23[32]: v" quantity="IT_L23/32/CELL_IT/v" scale="1mV" color="#4ce956" timeScale="1ms"/>
            <Line id="IT_L23[33]: v" quantity="IT_L23/33/CELL_IT/v" scale="1mV" color="#01ac73" timeScale="1ms"/>
            <Line id="IT_L23[34]: v" quantity="IT_L23/34/CELL_IT/v" scale="1mV" color="#ce785e" timeScale="1ms"/>
            <Line id="IT_L23[35]: v" quantity="IT_L23/35/CELL_IT/v" scale="1mV" color="#c10d73" timeScale="1ms"/>
            <Line id="IT_L23[36]: v" quantity="IT_L23/36/CELL_IT/v" scale="1mV" color="#b18f1c" timeScale="1ms"/>
            <Line id="IT_L23[37]: v" quantity="IT_L23/37/CELL_IT/v" scale="1mV" color="#bfa58b" timeScale="1ms"/>
            <Line id="IT_L23[38]: v" quantity="IT_L23/38/CELL_IT/v" scale="1mV" color="#9097d0" timeScale="1ms"/>
            <Line id="IT_L23[39]: v" quantity="IT_L23/39/CELL_IT/v" scale="1mV" color="#c21cd4" timeScale="1ms"/>
            <Line id="IT_L23[40]: v" quantity="IT_L23/40/CELL_IT/v" scale="1mV" color="#a5388c" timeScale="1ms"/>
            <Line id="IT_L23[41]: v" quantity="IT_L23/41/CELL_IT/v" scale="1mV" color="#d6555c" timeScale="1ms"/>
            <Line id="IT_L23[42]: v" quantity="IT_L23/42/CELL_IT/v" scale="1mV" color="#18444e" timeScale="1ms"/>
            <Line id="IT_L23[43]: v" quantity="IT_L23/43/CELL_IT/v" scale="1mV" color="#14cfca" timeScale="1ms"/>
            <Line id="IT_L23[44]: v" quantity="IT_L23/44/CELL_IT/v" scale="1mV" color="#f5a1e3" timeScale="1ms"/>
            <Line id="IT_L23[45]: v" quantity="IT_L23/45/CELL_IT/v" scale="1mV" color="#2fbc2a" timeScale="1ms"/>
            <Line id="IT_L23[46]: v" quantity="IT_L23/46/CELL_IT/v" scale="1mV" color="#32f489" timeScale="1ms"/>
            <Line id="IT_L23[47]: v" quantity="IT_L23/47/CELL_IT/v" scale="1mV" color="#8e26dc" timeScale="1ms"/>
            <Line id="IT_L23[48]: v" quantity="IT_L23/48/CELL_IT/v" scale="1mV" color="#6794a1" timeScale="1ms"/>
            <Line id="IT_L23[49]: v" quantity="IT_L23/49/CELL_IT/v" scale="1mV" color="#c6da36" timeScale="1ms"/>
            <Line id="IT_L23[50]: v" quantity="IT_L23/50/CELL_IT/v" scale="1mV" color="#504aca" timeScale="1ms"/>
        </Display>

        <Display id="DispPop__IT_L4" title="Membrane potentials of cells in IT_L4" timeScale="1ms" xmin="-10.0" xmax="110.0" ymin="-90" ymax="50">
            <Line id="IT_L4[0]: v" quantity="IT_L4/0/CELL_IT/v" scale="1mV" color="#0c1038" timeScale="1ms"/>
            <Line id="IT_L4[1]: v" quantity="IT_L4/1/CELL_IT/v" scale="1mV" color="#521889" timeScale="1ms"/>
            <Line id="IT_L4[2]: v" quantity="IT_L4/2/CELL_IT/v" scale="1mV" color="#450150" timeScale="1ms"/>
            <Line id="IT_L4[3]: v" quantity="IT_L4/3/CELL_IT/v" scale="1mV" color="#55ec10" timeScale="1ms"/>
            <Line id="IT_L4[4]: v" quantity="IT_L4/4/CELL_IT/v" scale="1mV" color="#7e8cfe" timeScale="1ms"/>
            <Line id="IT_L4[5]: v" quantity="IT_L4/5/CELL_IT/v" scale="1mV" color="#4501f3" timeScale="1ms"/>
            <Line id="IT_L4[6]: v" quantity="IT_L4/6/CELL_IT/v" scale="1mV" color="#1c54c7" timeScale="1ms"/>
            <Line id="IT_L4[7]: v" quantity="IT_L4/7/CELL_IT/v" scale="1mV" color="#d1ca8c" timeScale="1ms"/>
            <Line id="IT_L4[8]: v" quantity="IT_L4/8/CELL_IT/v" scale="1mV" color="#7b3cff" timeScale="1ms"/>
            <Line id="IT_L4[9]: v" quantity="IT_L4/9/CELL_IT/v" scale="1mV" color="#0bb703" timeScale="1ms"/>
            <Line id="IT_L4[10]: v" quantity="IT_L4/10/CELL_IT/v" scale="1mV" color="#e0069b" timeScale="1ms"/>
            <Line id="IT_L4[11]: v" quantity="IT_L4/11/CELL_IT/v" scale="1mV" color="#7fe239" timeScale="1ms"/>
            <Line id="IT_L4[12]: v" quantity="IT_L4/12/CELL_IT/v" scale="1mV" color="#18a1de" timeScale="1ms"/>
            <Line id="IT_L4[13]: v" quantity="IT_L4/13/CELL_IT/v" scale="1mV" color="#66595c" timeScale="1ms"/>
            <Line id="IT_L4[14]: v" quantity="IT_L4/14/CELL_IT/v" scale="1mV" color="#ed467b" timeScale="1ms"/>
            <Line id="IT_L4[15]: v" quantity="IT_L4/15/CELL_IT/v" scale="1mV" color="#c1bb7a" timeScale="1ms"/>
            <Line id="IT_L4[16]: v" quantity="IT_L4/16/CELL_IT/v" scale="1mV" color="#52cfbe" timeScale="1ms"/>
            <Line id="IT_L4[17]: v" quantity="IT_L4/17/CELL_IT/v" scale="1mV" color="#96e816" timeScale="1ms"/>
            <Line id="IT_L4[18]: v" quantity="IT_L4/18/CELL_IT/v" scale="1mV" color="#ecb966" timeScale="1ms"/>
            <Line id="IT_L4[19]: v" quantity="IT_L4/19/CELL_IT/v" scale="1mV" color="#394a7a" timeScale="1ms"/>
            <Line id="IT_L4[20]: v" quantity="IT_L4/20/CELL_IT/v" scale="1mV" color="#e87591" timeScale="1ms"/>
            <Line id="IT_L4[21]: v" quantity="IT_L4/21/CELL_IT/v" scale="1mV" color="#5db34d" timeScale="1ms"/>
            <Line id="IT_L4[22]: v" quantity="IT_L4/22/CELL_IT/v" scale="1mV" color="#004fab" timeScale="1ms"/>
            <Line id="IT_L4[23]: v" quantity="IT_L4/23/CELL_IT/v" scale="1mV" color="#ce1f85" timeScale="1ms"/>
            <Line id="IT_L4[24]: v" quantity="IT_L4/24/CELL_IT/v" scale="1mV" color="#b354bb" timeScale="1ms"/>
            <Line id="IT_L4[25]: v" quantity="IT_L4/25/CELL_IT/v" scale="1mV" color="#81b702" timeScale="1ms"/>
        </Display>

        <Display id="DispPop__IT_L5A" title="Membrane potentials of cells in IT_L5A" timeScale="1ms" xmin="-10.0" xmax="110.0" ymin="-90" ymax="50">
            <Line id="IT_L5A[0]: v" quantity="IT_L5A/0/CELL_IT/v" scale="1mV" color="#2508a2" timeScale="1ms"/>
            <Line id="IT_L5A[1]: v" quantity="IT_L5A/1/CELL_IT/v" scale="1mV" color="#ec39d2" timeScale="1ms"/>
            <Line id="IT_L5A[2]: v" quantity="IT_L5A/2/CELL_IT/v" scale="1mV" color="#26f447" timeScale="1ms"/>
            <Line id="IT_L5A[3]: v" quantity="IT_L5A/3/CELL_IT/v" scale="1mV" color="#ebe769" timeScale="1ms"/>
            <Line id="IT_L5A[4]: v" quantity="IT_L5A/4/CELL_IT/v" scale="1mV" color="#62e19f" timeScale="1ms"/>
            <Line id="IT_L5A[5]: v" quantity="IT_L5A/5/CELL_IT/v" scale="1mV" color="#b5328b" timeScale="1ms"/>
            <Line id="IT_L5A[6]: v" quantity="IT_L5A/6/CELL_IT/v" scale="1mV" color="#63a2e8" timeScale="1ms"/>
            <Line id="IT_L5A[7]: v" quantity="IT_L5A/7/CELL_IT/v" scale="1mV" color="#26f736" timeScale="1ms"/>
            <Line id="IT_L5A[8]: v" quantity="IT_L5A/8/CELL_IT/v" scale="1mV" color="#fe58bd" timeScale="1ms"/>
            <Line id="IT_L5A[9]: v" quantity="IT_L5A/9/CELL_IT/v" scale="1mV" color="#4596c7" timeScale="1ms"/>
            <Line id="IT_L5A[10]: v" quantity="IT_L5A/10/CELL_IT/v" scale="1mV" color="#2229e9" timeScale="1ms"/>
            <Line id="IT_L5A[11]: v" quantity="IT_L5A/11/CELL_IT/v" scale="1mV" color="#d0da59" timeScale="1ms"/>
            <Line id="IT_L5A[12]: v" quantity="IT_L5A/12/CELL_IT/v" scale="1mV" color="#4e2667" timeScale="1ms"/>
            <Line id="IT_L5A[13]: v" quantity="IT_L5A/13/CELL_IT/v" scale="1mV" color="#7e993b" timeScale="1ms"/>
            <Line id="IT_L5A[14]: v" quantity="IT_L5A/14/CELL_IT/v" scale="1mV" color="#87f255" timeScale="1ms"/>
            <Line id="IT_L5A[15]: v" quantity="IT_L5A/15/CELL_IT/v" scale="1mV" color="#b75b9a" timeScale="1ms"/>
            <Line id="IT_L5A[16]: v" quantity="IT_L5A/16/CELL_IT/v" scale="1mV" color="#a6c7e9" timeScale="1ms"/>
            <Line id="IT_L5A[17]: v" quantity="IT_L5A/17/CELL_IT/v" scale="1mV" color="#a90248" timeScale="1ms"/>
            <Line id="IT_L5A[18]: v" quantity="IT_L5A/18/CELL_IT/v" scale="1mV" color="#b9cca2" timeScale="1ms"/>
            <Line id="IT_L5A[19]: v" quantity="IT_L5A/19/CELL_IT/v" scale="1mV" color="#d3ab70" timeScale="1ms"/>
            <Line id="IT_L5A[20]: v" quantity="IT_L5A/20/CELL_IT/v" scale="1mV" color="#231c5f" timeScale="1ms"/>
            <Line id="IT_L5A[21]: v" quantity="IT_L5A/21/CELL_IT/v" scale="1mV" color="#b659a1" timeScale="1ms"/>
            <Line id="IT_L5A[22]: v" quantity="IT_L5A/22/CELL_IT/v" scale="1mV" color="#e4d198" timeScale="1ms"/>
            <Line id="IT_L5A[23]: v" quantity="IT_L5A/23/CELL_IT/v" scale="1mV" color="#7ab04e" timeScale="1ms"/>
            <Line id="IT_L5A[24]: v" quantity="IT_L5A/24/CELL_IT/v" scale="1mV" color="#18c3f7" timeScale="1ms"/>
            <Line id="IT_L5A[25]: v" quantity="IT_L5A/25/CELL_IT/v" scale="1mV" color="#cc2d8c" timeScale="1ms"/>
            <Line id="IT_L5A[26]: v" quantity="IT_L5A/26/CELL_IT/v" scale="1mV" color="#d9f1af" timeScale="1ms"/>
            <Line id="IT_L5A[27]: v" quantity="IT_L5A/27/CELL_IT/v" scale="1mV" color="#861104" timeScale="1ms"/>
            <Line id="IT_L5A[28]: v" quantity="IT_L5A/28/CELL_IT/v" scale="1mV" color="#8a204c" timeScale="1ms"/>
        </Display>

        <Display id="DispPop__IT_L5B" title="Membrane potentials of cells in IT_L5B" timeScale="1ms" xmin="-10.0" xmax="110.0" ymin="-90" ymax="50">
            <Line id="IT_L5B[0]: v" quantity="IT_L5B/0/CELL_IT/v" scale="1mV" color="#6e3850" timeScale="1ms"/>
            <Line id="IT_L5B[1]: v" quantity="IT_L5B/1/CELL_IT/v" scale="1mV" color="#c82451" timeScale="1ms"/>
            <Line id="IT_L5B[2]: v" quantity="IT_L5B/2/CELL_IT/v" scale="1mV" color="#3be1c5" timeScale="1ms"/>
            <Line id="IT_L5B[3]: v" quantity="IT_L5B/3/CELL_IT/v" scale="1mV" color="#1c3f4f" timeScale="1ms"/>
            <Line id="IT_L5B[4]: v" quantity="IT_L5B/4/CELL_IT/v" scale="1mV" color="#82b6ac" timeScale="1ms"/>
            <Line id="IT_L5B[5]: v" quantity="IT_L5B/5/CELL_IT/v" scale="1mV" color="#7859c4" timeScale="1ms"/>
            <Line id="IT_L5B[6]: v" quantity="IT_L5B/6/CELL_IT/v" scale="1mV" color="#ca41f2" timeScale="1ms"/>
            <Line id="IT_L5B[7]: v" quantity="IT_L5B/7/CELL_IT/v" scale="1mV" color="#69ee46" timeScale="1ms"/>
            <Line id="IT_L5B[8]: v" quantity="IT_L5B/8/CELL_IT/v" scale="1mV" color="#6a0d6e" timeScale="1ms"/>
            <Line id="IT_L5B[9]: v" quantity="IT_L5B/9/CELL_IT/v" scale="1mV" color="#921e4c" timeScale="1ms"/>
            <Line id="IT_L5B[10]: v" quantity="IT_L5B/10/CELL_IT/v" scale="1mV" color="#540c3d" timeScale="1ms"/>
            <Line id="IT_L5B[11]: v" quantity="IT_L5B/11/CELL_IT/v" scale="1mV" color="#78be87" timeScale="1ms"/>
            <Line id="IT_L5B[12]: v" quantity="IT_L5B/12/CELL_IT/v" scale="1mV" color="#0c6cf6" timeScale="1ms"/>
            <Line id="IT_L5B[13]: v" quantity="IT_L5B/13/CELL_IT/v" scale="1mV" color="#ab65d7" timeScale="1ms"/>
            <Line id="IT_L5B[14]: v" quantity="IT_L5B/14/CELL_IT/v" scale="1mV" color="#9c7195" timeScale="1ms"/>
            <Line id="IT_L5B[15]: v" quantity="IT_L5B/15/CELL_IT/v" scale="1mV" color="#dcce53" timeScale="1ms"/>
            <Line id="IT_L5B[16]: v" quantity="IT_L5B/16/CELL_IT/v" scale="1mV" color="#4edf76" timeScale="1ms"/>
            <Line id="IT_L5B[17]: v" quantity="IT_L5B/17/CELL_IT/v" scale="1mV" color="#d2aeca" timeScale="1ms"/>
            <Line id="IT_L5B[18]: v" quantity="IT_L5B/18/CELL_IT/v" scale="1mV" color="#ba7d5c" timeScale="1ms"/>
            <Line id="IT_L5B[19]: v" quantity="IT_L5B/19/CELL_IT/v" scale="1mV" color="#a9905a" timeScale="1ms"/>
            <Line id="IT_L5B[20]: v" quantity="IT_L5B/20/CELL_IT/v" scale="1mV" color="#a71db9" timeScale="1ms"/>
            <Line id="IT_L5B[21]: v" quantity="IT_L5B/21/CELL_IT/v" scale="1mV" color="#5e82d3" timeScale="1ms"/>
            <Line id="IT_L5B[22]: v" quantity="IT_L5B/22/CELL_IT/v" scale="1mV" color="#3db924" timeScale="1ms"/>
            <Line id="IT_L5B[23]: v" quantity="IT_L5B/23/CELL_IT/v" scale="1mV" color="#4e85bf" timeScale="1ms"/>
            <Line id="IT_L5B[24]: v" quantity="IT_L5B/24/CELL_IT/v" scale="1mV" color="#383969" timeScale="1ms"/>
            <Line id="IT_L5B[25]: v" quantity="IT_L5B/25/CELL_IT/v" scale="1mV" color="#16528f" timeScale="1ms"/>
            <Line id="IT_L5B[26]: v" quantity="IT_L5B/26/CELL_IT/v" scale="1mV" color="#4b92f4" timeScale="1ms"/>
            <Line id="IT_L5B[27]: v" quantity="IT_L5B/27/CELL_IT/v" scale="1mV" color="#2cecac" timeScale="1ms"/>
            <Line id="IT_L5B[28]: v" quantity="IT_L5B/28/CELL_IT/v" scale="1mV" color="#5ac555" timeScale="1ms"/>
            <Line id="IT_L5B[29]: v" quantity="IT_L5B/29/CELL_IT/v" scale="1mV" color="#fad2c0" timeScale="1ms"/>
            <Line id="IT_L5B[30]: v" quantity="IT_L5B/30/CELL_IT/v" scale="1mV" color="#09a754" timeScale="1ms"/>
            <Line id="IT_L5B[31]: v" quantity="IT_L5B/31/CELL_IT/v" scale="1mV" color="#b6d0e6" timeScale="1ms"/>
            <Line id="IT_L5B[32]: v" quantity="IT_L5B/32/CELL_IT/v" scale="1mV" color="#42069b" timeScale="1ms"/>
        </Display>

        <Display id="DispPop__PT_L5B" title="Membrane potentials of cells in PT_L5B" timeScale="1ms" xmin="-10.0" xmax="110.0" ymin="-90" ymax="50">
            <Line id="PT_L5B[0]: v" quantity="PT_L5B/0/CELL_PT/v" scale="1mV" color="#9807b0" timeScale="1ms"/>
            <Line id="PT_L5B[1]: v" quantity="PT_L5B/1/CELL_PT/v" scale="1mV" color="#ef3349" timeScale="1ms"/>
            <Line id="PT_L5B[2]: v" quantity="PT_L5B/2/CELL_PT/v" scale="1mV" color="#c4f4bc" timeScale="1ms"/>
            <Line id="PT_L5B[3]: v" quantity="PT_L5B/3/CELL_PT/v" scale="1mV" color="#ee0bc1" timeScale="1ms"/>
            <Line id="PT_L5B[4]: v" quantity="PT_L5B/4/CELL_PT/v" scale="1mV" color="#424fa6" timeScale="1ms"/>
            <Line id="PT_L5B[5]: v" quantity="PT_L5B/5/CELL_PT/v" scale="1mV" color="#3be619" timeScale="1ms"/>
            <Line id="PT_L5B[6]: v" quantity="PT_L5B/6/CELL_PT/v" scale="1mV" color="#ec51fd" timeScale="1ms"/>
            <Line id="PT_L5B[7]: v" quantity="PT_L5B/7/CELL_PT/v" scale="1mV" color="#e1eeb0" timeScale="1ms"/>
            <Line id="PT_L5B[8]: v" quantity="PT_L5B/8/CELL_PT/v" scale="1mV" color="#5c189f" timeScale="1ms"/>
            <Line id="PT_L5B[9]: v" quantity="PT_L5B/9/CELL_PT/v" scale="1mV" color="#30f72d" timeScale="1ms"/>
            <Line id="PT_L5B[10]: v" quantity="PT_L5B/10/CELL_PT/v" scale="1mV" color="#def4ca" timeScale="1ms"/>
            <Line id="PT_L5B[11]: v" quantity="PT_L5B/11/CELL_PT/v" scale="1mV" color="#f69917" timeScale="1ms"/>
            <Line id="PT_L5B[12]: v" quantity="PT_L5B/12/CELL_PT/v" scale="1mV" color="#f22d39" timeScale="1ms"/>
            <Line id="PT_L5B[13]: v" quantity="PT_L5B/13/CELL_PT/v" scale="1mV" color="#8fad68" timeScale="1ms"/>
            <Line id="PT_L5B[14]: v" quantity="PT_L5B/14/CELL_PT/v" scale="1mV" color="#fc28fb" timeScale="1ms"/>
            <Line id="PT_L5B[15]: v" quantity="PT_L5B/15/CELL_PT/v" scale="1mV" color="#7d6503" timeScale="1ms"/>
            <Line id="PT_L5B[16]: v" quantity="PT_L5B/16/CELL_PT/v" scale="1mV" color="#c6882c" timeScale="1ms"/>
            <Line id="PT_L5B[17]: v" quantity="PT_L5B/17/CELL_PT/v" scale="1mV" color="#4638f3" timeScale="1ms"/>
            <Line id="PT_L5B[18]: v" quantity="PT_L5B/18/CELL_PT/v" scale="1mV" color="#9eba3d" timeScale="1ms"/>
            <Line id="PT_L5B[19]: v" quantity="PT_L5B/19/CELL_PT/v" scale="1mV" color="#0d7fa0" timeScale="1ms"/>
            <Line id="PT_L5B[20]: v" quantity="PT_L5B/20/CELL_PT/v" scale="1mV" color="#39ec76" timeScale="1ms"/>
            <Line id="PT_L5B[21]: v" quantity="PT_L5B/21/CELL_PT/v" scale="1mV" color="#94b46d" timeScale="1ms"/>
            <Line id="PT_L5B[22]: v" quantity="PT_L5B/22/CELL_PT/v" scale="1mV" color="#1e229e" timeScale="1ms"/>
            <Line id="PT_L5B[23]: v" quantity="PT_L5B/23/CELL_PT/v" scale="1mV" color="#d82194" timeScale="1ms"/>
            <Line id="PT_L5B[24]: v" quantity="PT_L5B/24/CELL_PT/v" scale="1mV" color="#e76231" timeScale="1ms"/>
            <Line id="PT_L5B[25]: v" quantity="PT_L5B/25/CELL_PT/v" scale="1mV" color="#d1867c" timeScale="1ms"/>
            <Line id="PT_L5B[26]: v" quantity="PT_L5B/26/CELL_PT/v" scale="1mV" color="#b2f521" timeScale="1ms"/>
            <Line id="PT_L5B[27]: v" quantity="PT_L5B/27/CELL_PT/v" scale="1mV" color="#263dc2" timeScale="1ms"/>
            <Line id="PT_L5B[28]: v" quantity="PT_L5B/28/CELL_PT/v" scale="1mV" color="#eaf1f8" timeScale="1ms"/>
            <Line id="PT_L5B[29]: v" quantity="PT_L5B/29/CELL_PT/v" scale="1mV" color="#7736a9" timeScale="1ms"/>
            <Line id="PT_L5B[30]: v" quantity="PT_L5B/30/CELL_PT/v" scale="1mV" color="#7d0239" timeScale="1ms"/>
            <Line id="PT_L5B[31]: v" quantity="PT_L5B/31/CELL_PT/v" scale="1mV" color="#5f2733" timeScale="1ms"/>
            <Line id="PT_L5B[32]: v" quantity="PT_L5B/32/CELL_PT/v" scale="1mV" color="#1800ef" timeScale="1ms"/>
        </Display>

        <Display id="DispPop__IT_L6" title="Membrane potentials of cells in IT_L6" timeScale="1ms" xmin="-10.0" xmax="110.0" ymin="-90" ymax="50">
            <Line id="IT_L6[0]: v" quantity="IT_L6/0/CELL_IT/v" scale="1mV" color="#496251" timeScale="1ms"/>
            <Line id="IT_L6[1]: v" quantity="IT_L6/1/CELL_IT/v" scale="1mV" color="#d7eb58" timeScale="1ms"/>
            <Line id="IT_L6[2]: v" quantity="IT_L6/2/CELL_IT/v" scale="1mV" color="#ca1dd9" timeScale="1ms"/>
            <Line id="IT_L6[3]: v" quantity="IT_L6/3/CELL_IT/v" scale="1mV" color="#43bb09" timeScale="1ms"/>
            <Line id="IT_L6[4]: v" quantity="IT_L6/4/CELL_IT/v" scale="1mV" color="#b09970" timeScale="1ms"/>
            <Line id="IT_L6[5]: v" quantity="IT_L6/5/CELL_IT/v" scale="1mV" color="#332256" timeScale="1ms"/>
            <Line id="IT_L6[6]: v" quantity="IT_L6/6/CELL_IT/v" scale="1mV" color="#441d60" timeScale="1ms"/>
            <Line id="IT_L6[7]: v" quantity="IT_L6/7/CELL_IT/v" scale="1mV" color="#583210" timeScale="1ms"/>
            <Line id="IT_L6[8]: v" quantity="IT_L6/8/CELL_IT/v" scale="1mV" color="#265cc6" timeScale="1ms"/>
            <Line id="IT_L6[9]: v" quantity="IT_L6/9/CELL_IT/v" scale="1mV" color="#e4722c" timeScale="1ms"/>
            <Line id="IT_L6[10]: v" quantity="IT_L6/10/CELL_IT/v" scale="1mV" color="#8d6737" timeScale="1ms"/>
            <Line id="IT_L6[11]: v" quantity="IT_L6/11/CELL_IT/v" scale="1mV" color="#813663" timeScale="1ms"/>
            <Line id="IT_L6[12]: v" quantity="IT_L6/12/CELL_IT/v" scale="1mV" color="#f7d0d0" timeScale="1ms"/>
            <Line id="IT_L6[13]: v" quantity="IT_L6/13/CELL_IT/v" scale="1mV" color="#6dc38d" timeScale="1ms"/>
            <Line id="IT_L6[14]: v" quantity="IT_L6/14/CELL_IT/v" scale="1mV" color="#1b58ea" timeScale="1ms"/>
            <Line id="IT_L6[15]: v" quantity="IT_L6/15/CELL_IT/v" scale="1mV" color="#b6a571" timeScale="1ms"/>
            <Line id="IT_L6[16]: v" quantity="IT_L6/16/CELL_IT/v" scale="1mV" color="#f5fe0b" timeScale="1ms"/>
            <Line id="IT_L6[17]: v" quantity="IT_L6/17/CELL_IT/v" scale="1mV" color="#5a2018" timeScale="1ms"/>
            <Line id="IT_L6[18]: v" quantity="IT_L6/18/CELL_IT/v" scale="1mV" color="#dc936a" timeScale="1ms"/>
            <Line id="IT_L6[19]: v" quantity="IT_L6/19/CELL_IT/v" scale="1mV" color="#b63472" timeScale="1ms"/>
            <Line id="IT_L6[20]: v" quantity="IT_L6/20/CELL_IT/v" scale="1mV" color="#2a3911" timeScale="1ms"/>
            <Line id="IT_L6[21]: v" quantity="IT_L6/21/CELL_IT/v" scale="1mV" color="#12cd92" timeScale="1ms"/>
            <Line id="IT_L6[22]: v" quantity="IT_L6/22/CELL_IT/v" scale="1mV" color="#49f2e3" timeScale="1ms"/>
            <Line id="IT_L6[23]: v" quantity="IT_L6/23/CELL_IT/v" scale="1mV" color="#d5ab0c" timeScale="1ms"/>
            <Line id="IT_L6[24]: v" quantity="IT_L6/24/CELL_IT/v" scale="1mV" color="#47b8a5" timeScale="1ms"/>
            <Line id="IT_L6[25]: v" quantity="IT_L6/25/CELL_IT/v" scale="1mV" color="#41213b" timeScale="1ms"/>
            <Line id="IT_L6[26]: v" quantity="IT_L6/26/CELL_IT/v" scale="1mV" color="#6cb13e" timeScale="1ms"/>
            <Line id="IT_L6[27]: v" quantity="IT_L6/27/CELL_IT/v" scale="1mV" color="#ad9ed0" timeScale="1ms"/>
            <Line id="IT_L6[28]: v" quantity="IT_L6/28/CELL_IT/v" scale="1mV" color="#632443" timeScale="1ms"/>
            <Line id="IT_L6[29]: v" quantity="IT_L6/29/CELL_IT/v" scale="1mV" color="#2f7703" timeScale="1ms"/>
            <Line id="IT_L6[30]: v" quantity="IT_L6/30/CELL_IT/v" scale="1mV" color="#3cebd4" timeScale="1ms"/>
        </Display>

        <Display id="DispPop__CT_L6" title="Membrane potentials of cells in CT_L6" timeScale="1ms" xmin="-10.0" xmax="110.0" ymin="-90" ymax="50">
            <Line id="CT_L6[0]: v" quantity="CT_L6/0/CELL_CT/v" scale="1mV" color="#7ff5aa" timeScale="1ms"/>
            <Line id="CT_L6[1]: v" quantity="CT_L6/1/CELL_CT/v" scale="1mV" color="#c6ae3c" timeScale="1ms"/>
            <Line id="CT_L6[2]: v" quantity="CT_L6/2/CELL_CT/v" scale="1mV" color="#ede3b9" timeScale="1ms"/>
            <Line id="CT_L6[3]: v" quantity="CT_L6/3/CELL_CT/v" scale="1mV" color="#7d756d" timeScale="1ms"/>
            <Line id="CT_L6[4]: v" quantity="CT_L6/4/CELL_CT/v" scale="1mV" color="#4e57ab" timeScale="1ms"/>
            <Line id="CT_L6[5]: v" quantity="CT_L6/5/CELL_CT/v" scale="1mV" color="#dab3e3" timeScale="1ms"/>
            <Line id="CT_L6[6]: v" quantity="CT_L6/6/CELL_CT/v" scale="1mV" color="#0fa4af" timeScale="1ms"/>
            <Line id="CT_L6[7]: v" quantity="CT_L6/7/CELL_CT/v" scale="1mV" color="#41ba2d" timeScale="1ms"/>
            <Line id="CT_L6[8]: v" quantity="CT_L6/8/CELL_CT/v" scale="1mV" color="#0a2f4a" timeScale="1ms"/>
            <Line id="CT_L6[9]: v" quantity="CT_L6/9/CELL_CT/v" scale="1mV" color="#944d07" timeScale="1ms"/>
            <Line id="CT_L6[10]: v" quantity="CT_L6/10/CELL_CT/v" scale="1mV" color="#1402de" timeScale="1ms"/>
            <Line id="CT_L6[11]: v" quantity="CT_L6/11/CELL_CT/v" scale="1mV" color="#c85236" timeScale="1ms"/>
            <Line id="CT_L6[12]: v" quantity="CT_L6/12/CELL_CT/v" scale="1mV" color="#1cff71" timeScale="1ms"/>
            <Line id="CT_L6[13]: v" quantity="CT_L6/13/CELL_CT/v" scale="1mV" color="#f8b0ac" timeScale="1ms"/>
            <Line id="CT_L6[14]: v" quantity="CT_L6/14/CELL_CT/v" scale="1mV" color="#5c68f4" timeScale="1ms"/>
            <Line id="CT_L6[15]: v" quantity="CT_L6/15/CELL_CT/v" scale="1mV" color="#ea618f" timeScale="1ms"/>
            <Line id="CT_L6[16]: v" quantity="CT_L6/16/CELL_CT/v" scale="1mV" color="#d3a25a" timeScale="1ms"/>
            <Line id="CT_L6[17]: v" quantity="CT_L6/17/CELL_CT/v" scale="1mV" color="#d031b1" timeScale="1ms"/>
            <Line id="CT_L6[18]: v" quantity="CT_L6/18/CELL_CT/v" scale="1mV" color="#12962b" timeScale="1ms"/>
            <Line id="CT_L6[19]: v" quantity="CT_L6/19/CELL_CT/v" scale="1mV" color="#11f14b" timeScale="1ms"/>
            <Line id="CT_L6[20]: v" quantity="CT_L6/20/CELL_CT/v" scale="1mV" color="#b8fb28" timeScale="1ms"/>
            <Line id="CT_L6[21]: v" quantity="CT_L6/21/CELL_CT/v" scale="1mV" color="#fd6787" timeScale="1ms"/>
            <Line id="CT_L6[22]: v" quantity="CT_L6/22/CELL_CT/v" scale="1mV" color="#264467" timeScale="1ms"/>
            <Line id="CT_L6[23]: v" quantity="CT_L6/23/CELL_CT/v" scale="1mV" color="#ac5ee0" timeScale="1ms"/>
            <Line id="CT_L6[24]: v" quantity="CT_L6/24/CELL_CT/v" scale="1mV" color="#e8c8d7" timeScale="1ms"/>
            <Line id="CT_L6[25]: v" quantity="CT_L6/25/CELL_CT/v" scale="1mV" color="#d210bf" timeScale="1ms"/>
            <Line id="CT_L6[26]: v" quantity="CT_L6/26/CELL_CT/v" scale="1mV" color="#7feeea" timeScale="1ms"/>
            <Line id="CT_L6[27]: v" quantity="CT_L6/27/CELL_CT/v" scale="1mV" color="#598e4c" timeScale="1ms"/>
            <Line id="CT_L6[28]: v" quantity="CT_L6/28/CELL_CT/v" scale="1mV" color="#c35c1b" timeScale="1ms"/>
            <Line id="CT_L6[29]: v" quantity="CT_L6/29/CELL_CT/v" scale="1mV" color="#561809" timeScale="1ms"/>
            <Line id="CT_L6[30]: v" quantity="CT_L6/30/CELL_CT/v" scale="1mV" color="#7acfae" timeScale="1ms"/>
        </Display>

        <Display id="DispPop__PV_L23" title="Membrane potentials of cells in PV_L23" timeScale="1ms" xmin="-10.0" xmax="110.0" ymin="-90" ymax="50">
            <Line id="PV_L23[0]: v" quantity="PV_L23/0/CELL_PV/v" scale="1mV" color="#588aa1" timeScale="1ms"/>
            <Line id="PV_L23[1]: v" quantity="PV_L23/1/CELL_PV/v" scale="1mV" color="#a30d7d" timeScale="1ms"/>
            <Line id="PV_L23[2]: v" quantity="PV_L23/2/CELL_PV/v" scale="1mV" color="#d8f73c" timeScale="1ms"/>
            <Line id="PV_L23[3]: v" quantity="PV_L23/3/CELL_PV/v" scale="1mV" color="#77a8ae" timeScale="1ms"/>
            <Line id="PV_L23[4]: v" quantity="PV_L23/4/CELL_PV/v" scale="1mV" color="#fd54cc" timeScale="1ms"/>
            <Line id="PV_L23[5]: v" quantity="PV_L23/5/CELL_PV/v" scale="1mV" color="#1b50c4" timeScale="1ms"/>
            <Line id="PV_L23[6]: v" quantity="PV_L23/6/CELL_PV/v" scale="1mV" color="#69e012" timeScale="1ms"/>
        </Display>

        <Display id="DispPop__SOM_L23" title="Membrane potentials of cells in SOM_L23" timeScale="1ms" xmin="-10.0" xmax="110.0" ymin="-90" ymax="50">
            <Line id="SOM_L23[0]: v" quantity="SOM_L23/0/CELL_SOM/v" scale="1mV" color="#7efc01" timeScale="1ms"/>
            <Line id="SOM_L23[1]: v" quantity="SOM_L23/1/CELL_SOM/v" scale="1mV" color="#051fd9" timeScale="1ms"/>
            <Line id="SOM_L23[2]: v" quantity="SOM_L23/2/CELL_SOM/v" scale="1mV" color="#0c4203" timeScale="1ms"/>
            <Line id="SOM_L23[3]: v" quantity="SOM_L23/3/CELL_SOM/v" scale="1mV" color="#bdef72" timeScale="1ms"/>
            <Line id="SOM_L23[4]: v" quantity="SOM_L23/4/CELL_SOM/v" scale="1mV" color="#607e65" timeScale="1ms"/>
            <Line id="SOM_L23[5]: v" quantity="SOM_L23/5/CELL_SOM/v" scale="1mV" color="#bb49a1" timeScale="1ms"/>
            <Line id="SOM_L23[6]: v" quantity="SOM_L23/6/CELL_SOM/v" scale="1mV" color="#f15212" timeScale="1ms"/>
        </Display>

        <Display id="DispPop__PV_L5" title="Membrane potentials of cells in PV_L5" timeScale="1ms" xmin="-10.0" xmax="110.0" ymin="-90" ymax="50">
            <Line id="PV_L5[0]: v" quantity="PV_L5/0/CELL_PV/v" scale="1mV" color="#5e9732" timeScale="1ms"/>
            <Line id="PV_L5[1]: v" quantity="PV_L5/1/CELL_PV/v" scale="1mV" color="#2732e5" timeScale="1ms"/>
            <Line id="PV_L5[2]: v" quantity="PV_L5/2/CELL_PV/v" scale="1mV" color="#3c9ead" timeScale="1ms"/>
            <Line id="PV_L5[3]: v" quantity="PV_L5/3/CELL_PV/v" scale="1mV" color="#a913ca" timeScale="1ms"/>
            <Line id="PV_L5[4]: v" quantity="PV_L5/4/CELL_PV/v" scale="1mV" color="#09a5b8" timeScale="1ms"/>
            <Line id="PV_L5[5]: v" quantity="PV_L5/5/CELL_PV/v" scale="1mV" color="#bd4dca" timeScale="1ms"/>
            <Line id="PV_L5[6]: v" quantity="PV_L5/6/CELL_PV/v" scale="1mV" color="#b8f036" timeScale="1ms"/>
            <Line id="PV_L5[7]: v" quantity="PV_L5/7/CELL_PV/v" scale="1mV" color="#6da74a" timeScale="1ms"/>
            <Line id="PV_L5[8]: v" quantity="PV_L5/8/CELL_PV/v" scale="1mV" color="#f31792" timeScale="1ms"/>
            <Line id="PV_L5[9]: v" quantity="PV_L5/9/CELL_PV/v" scale="1mV" color="#c9781b" timeScale="1ms"/>
            <Line id="PV_L5[10]: v" quantity="PV_L5/10/CELL_PV/v" scale="1mV" color="#882bd2" timeScale="1ms"/>
            <Line id="PV_L5[11]: v" quantity="PV_L5/11/CELL_PV/v" scale="1mV" color="#c405d7" timeScale="1ms"/>
            <Line id="PV_L5[12]: v" quantity="PV_L5/12/CELL_PV/v" scale="1mV" color="#da0a28" timeScale="1ms"/>
            <Line id="PV_L5[13]: v" quantity="PV_L5/13/CELL_PV/v" scale="1mV" color="#ab4f36" timeScale="1ms"/>
            <Line id="PV_L5[14]: v" quantity="PV_L5/14/CELL_PV/v" scale="1mV" color="#633fc1" timeScale="1ms"/>
        </Display>

        <Display id="DispPop__SOM_L5" title="Membrane potentials of cells in SOM_L5" timeScale="1ms" xmin="-10.0" xmax="110.0" ymin="-90" ymax="50">
            <Line id="SOM_L5[0]: v" quantity="SOM_L5/0/CELL_SOM/v" scale="1mV" color="#d34fd8" timeScale="1ms"/>
            <Line id="SOM_L5[1]: v" quantity="SOM_L5/1/CELL_SOM/v" scale="1mV" color="#8f16a3" timeScale="1ms"/>
            <Line id="SOM_L5[2]: v" quantity="SOM_L5/2/CELL_SOM/v" scale="1mV" color="#89edc9" timeScale="1ms"/>
            <Line id="SOM_L5[3]: v" quantity="SOM_L5/3/CELL_SOM/v" scale="1mV" color="#dc1117" timeScale="1ms"/>
            <Line id="SOM_L5[4]: v" quantity="SOM_L5/4/CELL_SOM/v" scale="1mV" color="#d26b3f" timeScale="1ms"/>
            <Line id="SOM_L5[5]: v" quantity="SOM_L5/5/CELL_SOM/v" scale="1mV" color="#b09b48" timeScale="1ms"/>
            <Line id="SOM_L5[6]: v" quantity="SOM_L5/6/CELL_SOM/v" scale="1mV" color="#182c0e" timeScale="1ms"/>
            <Line id="SOM_L5[7]: v" quantity="SOM_L5/7/CELL_SOM/v" scale="1mV" color="#362514" timeScale="1ms"/>
            <Line id="SOM_L5[8]: v" quantity="SOM_L5/8/CELL_SOM/v" scale="1mV" color="#a102e4" timeScale="1ms"/>
            <Line id="SOM_L5[9]: v" quantity="SOM_L5/9/CELL_SOM/v" scale="1mV" color="#5b097b" timeScale="1ms"/>
            <Line id="SOM_L5[10]: v" quantity="SOM_L5/10/CELL_SOM/v" scale="1mV" color="#e99a8f" timeScale="1ms"/>
            <Line id="SOM_L5[11]: v" quantity="SOM_L5/11/CELL_SOM/v" scale="1mV" color="#5317c8" timeScale="1ms"/>
            <Line id="SOM_L5[12]: v" quantity="SOM_L5/12/CELL_SOM/v" scale="1mV" color="#9f42a8" timeScale="1ms"/>
            <Line id="SOM_L5[13]: v" quantity="SOM_L5/13/CELL_SOM/v" scale="1mV" color="#93aebe" timeScale="1ms"/>
            <Line id="SOM_L5[14]: v" quantity="SOM_L5/14/CELL_SOM/v" scale="1mV" color="#affd7b" timeScale="1ms"/>
        </Display>

        <Display id="DispPop__PV_L6" title="Membrane potentials of cells in PV_L6" timeScale="1ms" xmin="-10.0" xmax="110.0" ymin="-90" ymax="50">
            <Line id="PV_L6[0]: v" quantity="PV_L6/0/CELL_PV/v" scale="1mV" color="#6c44ef" timeScale="1ms"/>
            <Line id="PV_L6[1]: v" quantity="PV_L6/1/CELL_PV/v" scale="1mV" color="#e85edc" timeScale="1ms"/>
            <Line id="PV_L6[2]: v" quantity="PV_L6/2/CELL_PV/v" scale="1mV" color="#140433" timeScale="1ms"/>
            <Line id="PV_L6[3]: v" quantity="PV_L6/3/CELL_PV/v" scale="1mV" color="#395590" timeScale="1ms"/>
            <Line id="PV_L6[4]: v" quantity="PV_L6/4/CELL_PV/v" scale="1mV" color="#907680" timeScale="1ms"/>
            <Line id="PV_L6[5]: v" quantity="PV_L6/5/CELL_PV/v" scale="1mV" color="#c7b581" timeScale="1ms"/>
            <Line id="PV_L6[6]: v" quantity="PV_L6/6/CELL_PV/v" scale="1mV" color="#9b49e8" timeScale="1ms"/>
        </Display>

        <Display id="DispPop__SOM_L6" title="Membrane potentials of cells in SOM_L6" timeScale="1ms" xmin="-10.0" xmax="110.0" ymin="-90" ymax="50">
            <Line id="SOM_L6[0]: v" quantity="SOM_L6/0/CELL_SOM/v" scale="1mV" color="#6a39fd" timeScale="1ms"/>
            <Line id="SOM_L6[1]: v" quantity="SOM_L6/1/CELL_SOM/v" scale="1mV" color="#eab9af" timeScale="1ms"/>
            <Line id="SOM_L6[2]: v" quantity="SOM_L6/2/CELL_SOM/v" scale="1mV" color="#df0bb2" timeScale="1ms"/>
            <Line id="SOM_L6[3]: v" quantity="SOM_L6/3/CELL_SOM/v" scale="1mV" color="#d5046a" timeScale="1ms"/>
            <Line id="SOM_L6[4]: v" quantity="SOM_L6/4/CELL_SOM/v" scale="1mV" color="#4f3e6c" timeScale="1ms"/>
            <Line id="SOM_L6[5]: v" quantity="SOM_L6/5/CELL_SOM/v" scale="1mV" color="#20b12c" timeScale="1ms"/>
            <Line id="SOM_L6[6]: v" quantity="SOM_L6/6/CELL_SOM/v" scale="1mV" color="#81f806" timeScale="1ms"/>
        </Display>

        <OutputFile id="Volts_file__IT_L23" fileName="Sim_M1.IT_L23.v.dat">
            <OutputColumn id="v_IT_L23_0_CELL_IT_v" quantity="IT_L23/0/CELL_IT/v"/>
            <OutputColumn id="v_IT_L23_1_CELL_IT_v" quantity="IT_L23/1/CELL_IT/v"/>
            <OutputColumn id="v_IT_L23_2_CELL_IT_v" quantity="IT_L23/2/CELL_IT/v"/>
            <OutputColumn id="v_IT_L23_3_CELL_IT_v" quantity="IT_L23/3/CELL_IT/v"/>
            <OutputColumn id="v_IT_L23_4_CELL_IT_v" quantity="IT_L23/4/CELL_IT/v"/>
            <OutputColumn id="v_IT_L23_5_CELL_IT_v" quantity="IT_L23/5/CELL_IT/v"/>
            <OutputColumn id="v_IT_L23_6_CELL_IT_v" quantity="IT_L23/6/CELL_IT/v"/>
            <OutputColumn id="v_IT_L23_7_CELL_IT_v" quantity="IT_L23/7/CELL_IT/v"/>
            <OutputColumn id="v_IT_L23_8_CELL_IT_v" quantity="IT_L23/8/CELL_IT/v"/>
            <OutputColumn id="v_IT_L23_9_CELL_IT_v" quantity="IT_L23/9/CELL_IT/v"/>
            <OutputColumn id="v_IT_L23_10_CELL_IT_v" quantity="IT_L23/10/CELL_IT/v"/>
            <OutputColumn id="v_IT_L23_11_CELL_IT_v" quantity="IT_L23/11/CELL_IT/v"/>
            <OutputColumn id="v_IT_L23_12_CELL_IT_v" quantity="IT_L23/12/CELL_IT/v"/>
            <OutputColumn id="v_IT_L23_13_CELL_IT_v" quantity="IT_L23/13/CELL_IT/v"/>
            <OutputColumn id="v_IT_L23_14_CELL_IT_v" quantity="IT_L23/14/CELL_IT/v"/>
            <OutputColumn id="v_IT_L23_15_CELL_IT_v" quantity="IT_L23/15/CELL_IT/v"/>
            <OutputColumn id="v_IT_L23_16_CELL_IT_v" quantity="IT_L23/16/CELL_IT/v"/>
            <OutputColumn id="v_IT_L23_17_CELL_IT_v" quantity="IT_L23/17/CELL_IT/v"/>
            <OutputColumn id="v_IT_L23_18_CELL_IT_v" quantity="IT_L23/18/CELL_IT/v"/>
            <OutputColumn id="v_IT_L23_19_CELL_IT_v" quantity="IT_L23/19/CELL_IT/v"/>
            <OutputColumn id="v_IT_L23_20_CELL_IT_v" quantity="IT_L23/20/CELL_IT/v"/>
            <OutputColumn id="v_IT_L23_21_CELL_IT_v" quantity="IT_L23/21/CELL_IT/v"/>
            <OutputColumn id="v_IT_L23_22_CELL_IT_v" quantity="IT_L23/22/CELL_IT/v"/>
            <OutputColumn id="v_IT_L23_23_CELL_IT_v" quantity="IT_L23/23/CELL_IT/v"/>
            <OutputColumn id="v_IT_L23_24_CELL_IT_v" quantity="IT_L23/24/CELL_IT/v"/>
            <OutputColumn id="v_IT_L23_25_CELL_IT_v" quantity="IT_L23/25/CELL_IT/v"/>
            <OutputColumn id="v_IT_L23_26_CELL_IT_v" quantity="IT_L23/26/CELL_IT/v"/>
            <OutputColumn id="v_IT_L23_27_CELL_IT_v" quantity="IT_L23/27/CELL_IT/v"/>
            <OutputColumn id="v_IT_L23_28_CELL_IT_v" quantity="IT_L23/28/CELL_IT/v"/>
            <OutputColumn id="v_IT_L23_29_CELL_IT_v" quantity="IT_L23/29/CELL_IT/v"/>
            <OutputColumn id="v_IT_L23_30_CELL_IT_v" quantity="IT_L23/30/CELL_IT/v"/>
            <OutputColumn id="v_IT_L23_31_CELL_IT_v" quantity="IT_L23/31/CELL_IT/v"/>
            <OutputColumn id="v_IT_L23_32_CELL_IT_v" quantity="IT_L23/32/CELL_IT/v"/>
            <OutputColumn id="v_IT_L23_33_CELL_IT_v" quantity="IT_L23/33/CELL_IT/v"/>
            <OutputColumn id="v_IT_L23_34_CELL_IT_v" quantity="IT_L23/34/CELL_IT/v"/>
            <OutputColumn id="v_IT_L23_35_CELL_IT_v" quantity="IT_L23/35/CELL_IT/v"/>
            <OutputColumn id="v_IT_L23_36_CELL_IT_v" quantity="IT_L23/36/CELL_IT/v"/>
            <OutputColumn id="v_IT_L23_37_CELL_IT_v" quantity="IT_L23/37/CELL_IT/v"/>
            <OutputColumn id="v_IT_L23_38_CELL_IT_v" quantity="IT_L23/38/CELL_IT/v"/>
            <OutputColumn id="v_IT_L23_39_CELL_IT_v" quantity="IT_L23/39/CELL_IT/v"/>
            <OutputColumn id="v_IT_L23_40_CELL_IT_v" quantity="IT_L23/40/CELL_IT/v"/>
            <OutputColumn id="v_IT_L23_41_CELL_IT_v" quantity="IT_L23/41/CELL_IT/v"/>
            <OutputColumn id="v_IT_L23_42_CELL_IT_v" quantity="IT_L23/42/CELL_IT/v"/>
            <OutputColumn id="v_IT_L23_43_CELL_IT_v" quantity="IT_L23/43/CELL_IT/v"/>
            <OutputColumn id="v_IT_L23_44_CELL_IT_v" quantity="IT_L23/44/CELL_IT/v"/>
            <OutputColumn id="v_IT_L23_45_CELL_IT_v" quantity="IT_L23/45/CELL_IT/v"/>
            <OutputColumn id="v_IT_L23_46_CELL_IT_v" quantity="IT_L23/46/CELL_IT/v"/>
            <OutputColumn id="v_IT_L23_47_CELL_IT_v" quantity="IT_L23/47/CELL_IT/v"/>
            <OutputColumn id="v_IT_L23_48_CELL_IT_v" quantity="IT_L23/48/CELL_IT/v"/>
            <OutputColumn id="v_IT_L23_49_CELL_IT_v" quantity="IT_L23/49/CELL_IT/v"/>
            <OutputColumn id="v_IT_L23_50_CELL_IT_v" quantity="IT_L23/50/CELL_IT/v"/>
        </OutputFile>

        <OutputFile id="Volts_file__IT_L4" fileName="Sim_M1.IT_L4.v.dat">
            <OutputColumn id="v_IT_L4_0_CELL_IT_v" quantity="IT_L4/0/CELL_IT/v"/>
            <OutputColumn id="v_IT_L4_1_CELL_IT_v" quantity="IT_L4/1/CELL_IT/v"/>
            <OutputColumn id="v_IT_L4_2_CELL_IT_v" quantity="IT_L4/2/CELL_IT/v"/>
            <OutputColumn id="v_IT_L4_3_CELL_IT_v" quantity="IT_L4/3/CELL_IT/v"/>
            <OutputColumn id="v_IT_L4_4_CELL_IT_v" quantity="IT_L4/4/CELL_IT/v"/>
            <OutputColumn id="v_IT_L4_5_CELL_IT_v" quantity="IT_L4/5/CELL_IT/v"/>
            <OutputColumn id="v_IT_L4_6_CELL_IT_v" quantity="IT_L4/6/CELL_IT/v"/>
            <OutputColumn id="v_IT_L4_7_CELL_IT_v" quantity="IT_L4/7/CELL_IT/v"/>
            <OutputColumn id="v_IT_L4_8_CELL_IT_v" quantity="IT_L4/8/CELL_IT/v"/>
            <OutputColumn id="v_IT_L4_9_CELL_IT_v" quantity="IT_L4/9/CELL_IT/v"/>
            <OutputColumn id="v_IT_L4_10_CELL_IT_v" quantity="IT_L4/10/CELL_IT/v"/>
            <OutputColumn id="v_IT_L4_11_CELL_IT_v" quantity="IT_L4/11/CELL_IT/v"/>
            <OutputColumn id="v_IT_L4_12_CELL_IT_v" quantity="IT_L4/12/CELL_IT/v"/>
            <OutputColumn id="v_IT_L4_13_CELL_IT_v" quantity="IT_L4/13/CELL_IT/v"/>
            <OutputColumn id="v_IT_L4_14_CELL_IT_v" quantity="IT_L4/14/CELL_IT/v"/>
            <OutputColumn id="v_IT_L4_15_CELL_IT_v" quantity="IT_L4/15/CELL_IT/v"/>
            <OutputColumn id="v_IT_L4_16_CELL_IT_v" quantity="IT_L4/16/CELL_IT/v"/>
            <OutputColumn id="v_IT_L4_17_CELL_IT_v" quantity="IT_L4/17/CELL_IT/v"/>
            <OutputColumn id="v_IT_L4_18_CELL_IT_v" quantity="IT_L4/18/CELL_IT/v"/>
            <OutputColumn id="v_IT_L4_19_CELL_IT_v" quantity="IT_L4/19/CELL_IT/v"/>
            <OutputColumn id="v_IT_L4_20_CELL_IT_v" quantity="IT_L4/20/CELL_IT/v"/>
            <OutputColumn id="v_IT_L4_21_CELL_IT_v" quantity="IT_L4/21/CELL_IT/v"/>
            <OutputColumn id="v_IT_L4_22_CELL_IT_v" quantity="IT_L4/22/CELL_IT/v"/>
            <OutputColumn id="v_IT_L4_23_CELL_IT_v" quantity="IT_L4/23/CELL_IT/v"/>
            <OutputColumn id="v_IT_L4_24_CELL_IT_v" quantity="IT_L4/24/CELL_IT/v"/>
            <OutputColumn id="v_IT_L4_25_CELL_IT_v" quantity="IT_L4/25/CELL_IT/v"/>
        </OutputFile>

        <OutputFile id="Volts_file__IT_L5A" fileName="Sim_M1.IT_L5A.v.dat">
            <OutputColumn id="v_IT_L5A_0_CELL_IT_v" quantity="IT_L5A/0/CELL_IT/v"/>
            <OutputColumn id="v_IT_L5A_1_CELL_IT_v" quantity="IT_L5A/1/CELL_IT/v"/>
            <OutputColumn id="v_IT_L5A_2_CELL_IT_v" quantity="IT_L5A/2/CELL_IT/v"/>
            <OutputColumn id="v_IT_L5A_3_CELL_IT_v" quantity="IT_L5A/3/CELL_IT/v"/>
            <OutputColumn id="v_IT_L5A_4_CELL_IT_v" quantity="IT_L5A/4/CELL_IT/v"/>
            <OutputColumn id="v_IT_L5A_5_CELL_IT_v" quantity="IT_L5A/5/CELL_IT/v"/>
            <OutputColumn id="v_IT_L5A_6_CELL_IT_v" quantity="IT_L5A/6/CELL_IT/v"/>
            <OutputColumn id="v_IT_L5A_7_CELL_IT_v" quantity="IT_L5A/7/CELL_IT/v"/>
            <OutputColumn id="v_IT_L5A_8_CELL_IT_v" quantity="IT_L5A/8/CELL_IT/v"/>
            <OutputColumn id="v_IT_L5A_9_CELL_IT_v" quantity="IT_L5A/9/CELL_IT/v"/>
            <OutputColumn id="v_IT_L5A_10_CELL_IT_v" quantity="IT_L5A/10/CELL_IT/v"/>
            <OutputColumn id="v_IT_L5A_11_CELL_IT_v" quantity="IT_L5A/11/CELL_IT/v"/>
            <OutputColumn id="v_IT_L5A_12_CELL_IT_v" quantity="IT_L5A/12/CELL_IT/v"/>
            <OutputColumn id="v_IT_L5A_13_CELL_IT_v" quantity="IT_L5A/13/CELL_IT/v"/>
            <OutputColumn id="v_IT_L5A_14_CELL_IT_v" quantity="IT_L5A/14/CELL_IT/v"/>
            <OutputColumn id="v_IT_L5A_15_CELL_IT_v" quantity="IT_L5A/15/CELL_IT/v"/>
            <OutputColumn id="v_IT_L5A_16_CELL_IT_v" quantity="IT_L5A/16/CELL_IT/v"/>
            <OutputColumn id="v_IT_L5A_17_CELL_IT_v" quantity="IT_L5A/17/CELL_IT/v"/>
            <OutputColumn id="v_IT_L5A_18_CELL_IT_v" quantity="IT_L5A/18/CELL_IT/v"/>
            <OutputColumn id="v_IT_L5A_19_CELL_IT_v" quantity="IT_L5A/19/CELL_IT/v"/>
            <OutputColumn id="v_IT_L5A_20_CELL_IT_v" quantity="IT_L5A/20/CELL_IT/v"/>
            <OutputColumn id="v_IT_L5A_21_CELL_IT_v" quantity="IT_L5A/21/CELL_IT/v"/>
            <OutputColumn id="v_IT_L5A_22_CELL_IT_v" quantity="IT_L5A/22/CELL_IT/v"/>
            <OutputColumn id="v_IT_L5A_23_CELL_IT_v" quantity="IT_L5A/23/CELL_IT/v"/>
            <OutputColumn id="v_IT_L5A_24_CELL_IT_v" quantity="IT_L5A/24/CELL_IT/v"/>
            <OutputColumn id="v_IT_L5A_25_CELL_IT_v" quantity="IT_L5A/25/CELL_IT/v"/>
            <OutputColumn id="v_IT_L5A_26_CELL_IT_v" quantity="IT_L5A/26/CELL_IT/v"/>
            <OutputColumn id="v_IT_L5A_27_CELL_IT_v" quantity="IT_L5A/27/CELL_IT/v"/>
            <OutputColumn id="v_IT_L5A_28_CELL_IT_v" quantity="IT_L5A/28/CELL_IT/v"/>
        </OutputFile>

        <OutputFile id="Volts_file__IT_L5B" fileName="Sim_M1.IT_L5B.v.dat">
            <OutputColumn id="v_IT_L5B_0_CELL_IT_v" quantity="IT_L5B/0/CELL_IT/v"/>
            <OutputColumn id="v_IT_L5B_1_CELL_IT_v" quantity="IT_L5B/1/CELL_IT/v"/>
            <OutputColumn id="v_IT_L5B_2_CELL_IT_v" quantity="IT_L5B/2/CELL_IT/v"/>
            <OutputColumn id="v_IT_L5B_3_CELL_IT_v" quantity="IT_L5B/3/CELL_IT/v"/>
            <OutputColumn id="v_IT_L5B_4_CELL_IT_v" quantity="IT_L5B/4/CELL_IT/v"/>
            <OutputColumn id="v_IT_L5B_5_CELL_IT_v" quantity="IT_L5B/5/CELL_IT/v"/>
            <OutputColumn id="v_IT_L5B_6_CELL_IT_v" quantity="IT_L5B/6/CELL_IT/v"/>
            <OutputColumn id="v_IT_L5B_7_CELL_IT_v" quantity="IT_L5B/7/CELL_IT/v"/>
            <OutputColumn id="v_IT_L5B_8_CELL_IT_v" quantity="IT_L5B/8/CELL_IT/v"/>
            <OutputColumn id="v_IT_L5B_9_CELL_IT_v" quantity="IT_L5B/9/CELL_IT/v"/>
            <OutputColumn id="v_IT_L5B_10_CELL_IT_v" quantity="IT_L5B/10/CELL_IT/v"/>
            <OutputColumn id="v_IT_L5B_11_CELL_IT_v" quantity="IT_L5B/11/CELL_IT/v"/>
            <OutputColumn id="v_IT_L5B_12_CELL_IT_v" quantity="IT_L5B/12/CELL_IT/v"/>
            <OutputColumn id="v_IT_L5B_13_CELL_IT_v" quantity="IT_L5B/13/CELL_IT/v"/>
            <OutputColumn id="v_IT_L5B_14_CELL_IT_v" quantity="IT_L5B/14/CELL_IT/v"/>
            <OutputColumn id="v_IT_L5B_15_CELL_IT_v" quantity="IT_L5B/15/CELL_IT/v"/>
            <OutputColumn id="v_IT_L5B_16_CELL_IT_v" quantity="IT_L5B/16/CELL_IT/v"/>
            <OutputColumn id="v_IT_L5B_17_CELL_IT_v" quantity="IT_L5B/17/CELL_IT/v"/>
            <OutputColumn id="v_IT_L5B_18_CELL_IT_v" quantity="IT_L5B/18/CELL_IT/v"/>
            <OutputColumn id="v_IT_L5B_19_CELL_IT_v" quantity="IT_L5B/19/CELL_IT/v"/>
            <OutputColumn id="v_IT_L5B_20_CELL_IT_v" quantity="IT_L5B/20/CELL_IT/v"/>
            <OutputColumn id="v_IT_L5B_21_CELL_IT_v" quantity="IT_L5B/21/CELL_IT/v"/>
            <OutputColumn id="v_IT_L5B_22_CELL_IT_v" quantity="IT_L5B/22/CELL_IT/v"/>
            <OutputColumn id="v_IT_L5B_23_CELL_IT_v" quantity="IT_L5B/23/CELL_IT/v"/>
            <OutputColumn id="v_IT_L5B_24_CELL_IT_v" quantity="IT_L5B/24/CELL_IT/v"/>
            <OutputColumn id="v_IT_L5B_25_CELL_IT_v" quantity="IT_L5B/25/CELL_IT/v"/>
            <OutputColumn id="v_IT_L5B_26_CELL_IT_v" quantity="IT_L5B/26/CELL_IT/v"/>
            <OutputColumn id="v_IT_L5B_27_CELL_IT_v" quantity="IT_L5B/27/CELL_IT/v"/>
            <OutputColumn id="v_IT_L5B_28_CELL_IT_v" quantity="IT_L5B/28/CELL_IT/v"/>
            <OutputColumn id="v_IT_L5B_29_CELL_IT_v" quantity="IT_L5B/29/CELL_IT/v"/>
            <OutputColumn id="v_IT_L5B_30_CELL_IT_v" quantity="IT_L5B/30/CELL_IT/v"/>
            <OutputColumn id="v_IT_L5B_31_CELL_IT_v" quantity="IT_L5B/31/CELL_IT/v"/>
            <OutputColumn id="v_IT_L5B_32_CELL_IT_v" quantity="IT_L5B/32/CELL_IT/v"/>
        </OutputFile>

        <OutputFile id="Volts_file__PT_L5B" fileName="Sim_M1.PT_L5B.v.dat">
            <OutputColumn id="v_PT_L5B_0_CELL_PT_v" quantity="PT_L5B/0/CELL_PT/v"/>
            <OutputColumn id="v_PT_L5B_1_CELL_PT_v" quantity="PT_L5B/1/CELL_PT/v"/>
            <OutputColumn id="v_PT_L5B_2_CELL_PT_v" quantity="PT_L5B/2/CELL_PT/v"/>
            <OutputColumn id="v_PT_L5B_3_CELL_PT_v" quantity="PT_L5B/3/CELL_PT/v"/>
            <OutputColumn id="v_PT_L5B_4_CELL_PT_v" quantity="PT_L5B/4/CELL_PT/v"/>
            <OutputColumn id="v_PT_L5B_5_CELL_PT_v" quantity="PT_L5B/5/CELL_PT/v"/>
            <OutputColumn id="v_PT_L5B_6_CELL_PT_v" quantity="PT_L5B/6/CELL_PT/v"/>
            <OutputColumn id="v_PT_L5B_7_CELL_PT_v" quantity="PT_L5B/7/CELL_PT/v"/>
            <OutputColumn id="v_PT_L5B_8_CELL_PT_v" quantity="PT_L5B/8/CELL_PT/v"/>
            <OutputColumn id="v_PT_L5B_9_CELL_PT_v" quantity="PT_L5B/9/CELL_PT/v"/>
            <OutputColumn id="v_PT_L5B_10_CELL_PT_v" quantity="PT_L5B/10/CELL_PT/v"/>
            <OutputColumn id="v_PT_L5B_11_CELL_PT_v" quantity="PT_L5B/11/CELL_PT/v"/>
            <OutputColumn id="v_PT_L5B_12_CELL_PT_v" quantity="PT_L5B/12/CELL_PT/v"/>
            <OutputColumn id="v_PT_L5B_13_CELL_PT_v" quantity="PT_L5B/13/CELL_PT/v"/>
            <OutputColumn id="v_PT_L5B_14_CELL_PT_v" quantity="PT_L5B/14/CELL_PT/v"/>
            <OutputColumn id="v_PT_L5B_15_CELL_PT_v" quantity="PT_L5B/15/CELL_PT/v"/>
            <OutputColumn id="v_PT_L5B_16_CELL_PT_v" quantity="PT_L5B/16/CELL_PT/v"/>
            <OutputColumn id="v_PT_L5B_17_CELL_PT_v" quantity="PT_L5B/17/CELL_PT/v"/>
            <OutputColumn id="v_PT_L5B_18_CELL_PT_v" quantity="PT_L5B/18/CELL_PT/v"/>
            <OutputColumn id="v_PT_L5B_19_CELL_PT_v" quantity="PT_L5B/19/CELL_PT/v"/>
            <OutputColumn id="v_PT_L5B_20_CELL_PT_v" quantity="PT_L5B/20/CELL_PT/v"/>
            <OutputColumn id="v_PT_L5B_21_CELL_PT_v" quantity="PT_L5B/21/CELL_PT/v"/>
            <OutputColumn id="v_PT_L5B_22_CELL_PT_v" quantity="PT_L5B/22/CELL_PT/v"/>
            <OutputColumn id="v_PT_L5B_23_CELL_PT_v" quantity="PT_L5B/23/CELL_PT/v"/>
            <OutputColumn id="v_PT_L5B_24_CELL_PT_v" quantity="PT_L5B/24/CELL_PT/v"/>
            <OutputColumn id="v_PT_L5B_25_CELL_PT_v" quantity="PT_L5B/25/CELL_PT/v"/>
            <OutputColumn id="v_PT_L5B_26_CELL_PT_v" quantity="PT_L5B/26/CELL_PT/v"/>
            <OutputColumn id="v_PT_L5B_27_CELL_PT_v" quantity="PT_L5B/27/CELL_PT/v"/>
            <OutputColumn id="v_PT_L5B_28_CELL_PT_v" quantity="PT_L5B/28/CELL_PT/v"/>
            <OutputColumn id="v_PT_L5B_29_CELL_PT_v" quantity="PT_L5B/29/CELL_PT/v"/>
            <OutputColumn id="v_PT_L5B_30_CELL_PT_v" quantity="PT_L5B/30/CELL_PT/v"/>
            <OutputColumn id="v_PT_L5B_31_CELL_PT_v" quantity="PT_L5B/31/CELL_PT/v"/>
            <OutputColumn id="v_PT_L5B_32_CELL_PT_v" quantity="PT_L5B/32/CELL_PT/v"/>
        </OutputFile>

        <OutputFile id="Volts_file__IT_L6" fileName="Sim_M1.IT_L6.v.dat">
            <OutputColumn id="v_IT_L6_0_CELL_IT_v" quantity="IT_L6/0/CELL_IT/v"/>
            <OutputColumn id="v_IT_L6_1_CELL_IT_v" quantity="IT_L6/1/CELL_IT/v"/>
            <OutputColumn id="v_IT_L6_2_CELL_IT_v" quantity="IT_L6/2/CELL_IT/v"/>
            <OutputColumn id="v_IT_L6_3_CELL_IT_v" quantity="IT_L6/3/CELL_IT/v"/>
            <OutputColumn id="v_IT_L6_4_CELL_IT_v" quantity="IT_L6/4/CELL_IT/v"/>
            <OutputColumn id="v_IT_L6_5_CELL_IT_v" quantity="IT_L6/5/CELL_IT/v"/>
            <OutputColumn id="v_IT_L6_6_CELL_IT_v" quantity="IT_L6/6/CELL_IT/v"/>
            <OutputColumn id="v_IT_L6_7_CELL_IT_v" quantity="IT_L6/7/CELL_IT/v"/>
            <OutputColumn id="v_IT_L6_8_CELL_IT_v" quantity="IT_L6/8/CELL_IT/v"/>
            <OutputColumn id="v_IT_L6_9_CELL_IT_v" quantity="IT_L6/9/CELL_IT/v"/>
            <OutputColumn id="v_IT_L6_10_CELL_IT_v" quantity="IT_L6/10/CELL_IT/v"/>
            <OutputColumn id="v_IT_L6_11_CELL_IT_v" quantity="IT_L6/11/CELL_IT/v"/>
            <OutputColumn id="v_IT_L6_12_CELL_IT_v" quantity="IT_L6/12/CELL_IT/v"/>
            <OutputColumn id="v_IT_L6_13_CELL_IT_v" quantity="IT_L6/13/CELL_IT/v"/>
            <OutputColumn id="v_IT_L6_14_CELL_IT_v" quantity="IT_L6/14/CELL_IT/v"/>
            <OutputColumn id="v_IT_L6_15_CELL_IT_v" quantity="IT_L6/15/CELL_IT/v"/>
            <OutputColumn id="v_IT_L6_16_CELL_IT_v" quantity="IT_L6/16/CELL_IT/v"/>
            <OutputColumn id="v_IT_L6_17_CELL_IT_v" quantity="IT_L6/17/CELL_IT/v"/>
            <OutputColumn id="v_IT_L6_18_CELL_IT_v" quantity="IT_L6/18/CELL_IT/v"/>
            <OutputColumn id="v_IT_L6_19_CELL_IT_v" quantity="IT_L6/19/CELL_IT/v"/>
            <OutputColumn id="v_IT_L6_20_CELL_IT_v" quantity="IT_L6/20/CELL_IT/v"/>
            <OutputColumn id="v_IT_L6_21_CELL_IT_v" quantity="IT_L6/21/CELL_IT/v"/>
            <OutputColumn id="v_IT_L6_22_CELL_IT_v" quantity="IT_L6/22/CELL_IT/v"/>
            <OutputColumn id="v_IT_L6_23_CELL_IT_v" quantity="IT_L6/23/CELL_IT/v"/>
            <OutputColumn id="v_IT_L6_24_CELL_IT_v" quantity="IT_L6/24/CELL_IT/v"/>
            <OutputColumn id="v_IT_L6_25_CELL_IT_v" quantity="IT_L6/25/CELL_IT/v"/>
            <OutputColumn id="v_IT_L6_26_CELL_IT_v" quantity="IT_L6/26/CELL_IT/v"/>
            <OutputColumn id="v_IT_L6_27_CELL_IT_v" quantity="IT_L6/27/CELL_IT/v"/>
            <OutputColumn id="v_IT_L6_28_CELL_IT_v" quantity="IT_L6/28/CELL_IT/v"/>
            <OutputColumn id="v_IT_L6_29_CELL_IT_v" quantity="IT_L6/29/CELL_IT/v"/>
            <OutputColumn id="v_IT_L6_30_CELL_IT_v" quantity="IT_L6/30/CELL_IT/v"/>
        </OutputFile>

        <OutputFile id="Volts_file__CT_L6" fileName="Sim_M1.CT_L6.v.dat">
            <OutputColumn id="v_CT_L6_0_CELL_CT_v" quantity="CT_L6/0/CELL_CT/v"/>
            <OutputColumn id="v_CT_L6_1_CELL_CT_v" quantity="CT_L6/1/CELL_CT/v"/>
            <OutputColumn id="v_CT_L6_2_CELL_CT_v" quantity="CT_L6/2/CELL_CT/v"/>
            <OutputColumn id="v_CT_L6_3_CELL_CT_v" quantity="CT_L6/3/CELL_CT/v"/>
            <OutputColumn id="v_CT_L6_4_CELL_CT_v" quantity="CT_L6/4/CELL_CT/v"/>
            <OutputColumn id="v_CT_L6_5_CELL_CT_v" quantity="CT_L6/5/CELL_CT/v"/>
            <OutputColumn id="v_CT_L6_6_CELL_CT_v" quantity="CT_L6/6/CELL_CT/v"/>
            <OutputColumn id="v_CT_L6_7_CELL_CT_v" quantity="CT_L6/7/CELL_CT/v"/>
            <OutputColumn id="v_CT_L6_8_CELL_CT_v" quantity="CT_L6/8/CELL_CT/v"/>
            <OutputColumn id="v_CT_L6_9_CELL_CT_v" quantity="CT_L6/9/CELL_CT/v"/>
            <OutputColumn id="v_CT_L6_10_CELL_CT_v" quantity="CT_L6/10/CELL_CT/v"/>
            <OutputColumn id="v_CT_L6_11_CELL_CT_v" quantity="CT_L6/11/CELL_CT/v"/>
            <OutputColumn id="v_CT_L6_12_CELL_CT_v" quantity="CT_L6/12/CELL_CT/v"/>
            <OutputColumn id="v_CT_L6_13_CELL_CT_v" quantity="CT_L6/13/CELL_CT/v"/>
            <OutputColumn id="v_CT_L6_14_CELL_CT_v" quantity="CT_L6/14/CELL_CT/v"/>
            <OutputColumn id="v_CT_L6_15_CELL_CT_v" quantity="CT_L6/15/CELL_CT/v"/>
            <OutputColumn id="v_CT_L6_16_CELL_CT_v" quantity="CT_L6/16/CELL_CT/v"/>
            <OutputColumn id="v_CT_L6_17_CELL_CT_v" quantity="CT_L6/17/CELL_CT/v"/>
            <OutputColumn id="v_CT_L6_18_CELL_CT_v" quantity="CT_L6/18/CELL_CT/v"/>
            <OutputColumn id="v_CT_L6_19_CELL_CT_v" quantity="CT_L6/19/CELL_CT/v"/>
            <OutputColumn id="v_CT_L6_20_CELL_CT_v" quantity="CT_L6/20/CELL_CT/v"/>
            <OutputColumn id="v_CT_L6_21_CELL_CT_v" quantity="CT_L6/21/CELL_CT/v"/>
            <OutputColumn id="v_CT_L6_22_CELL_CT_v" quantity="CT_L6/22/CELL_CT/v"/>
            <OutputColumn id="v_CT_L6_23_CELL_CT_v" quantity="CT_L6/23/CELL_CT/v"/>
            <OutputColumn id="v_CT_L6_24_CELL_CT_v" quantity="CT_L6/24/CELL_CT/v"/>
            <OutputColumn id="v_CT_L6_25_CELL_CT_v" quantity="CT_L6/25/CELL_CT/v"/>
            <OutputColumn id="v_CT_L6_26_CELL_CT_v" quantity="CT_L6/26/CELL_CT/v"/>
            <OutputColumn id="v_CT_L6_27_CELL_CT_v" quantity="CT_L6/27/CELL_CT/v"/>
            <OutputColumn id="v_CT_L6_28_CELL_CT_v" quantity="CT_L6/28/CELL_CT/v"/>
            <OutputColumn id="v_CT_L6_29_CELL_CT_v" quantity="CT_L6/29/CELL_CT/v"/>
            <OutputColumn id="v_CT_L6_30_CELL_CT_v" quantity="CT_L6/30/CELL_CT/v"/>
        </OutputFile>

        <OutputFile id="Volts_file__PV_L23" fileName="Sim_M1.PV_L23.v.dat">
            <OutputColumn id="v_PV_L23_0_CELL_PV_v" quantity="PV_L23/0/CELL_PV/v"/>
            <OutputColumn id="v_PV_L23_1_CELL_PV_v" quantity="PV_L23/1/CELL_PV/v"/>
            <OutputColumn id="v_PV_L23_2_CELL_PV_v" quantity="PV_L23/2/CELL_PV/v"/>
            <OutputColumn id="v_PV_L23_3_CELL_PV_v" quantity="PV_L23/3/CELL_PV/v"/>
            <OutputColumn id="v_PV_L23_4_CELL_PV_v" quantity="PV_L23/4/CELL_PV/v"/>
            <OutputColumn id="v_PV_L23_5_CELL_PV_v" quantity="PV_L23/5/CELL_PV/v"/>
            <OutputColumn id="v_PV_L23_6_CELL_PV_v" quantity="PV_L23/6/CELL_PV/v"/>
        </OutputFile>

        <OutputFile id="Volts_file__SOM_L23" fileName="Sim_M1.SOM_L23.v.dat">
            <OutputColumn id="v_SOM_L23_0_CELL_SOM_v" quantity="SOM_L23/0/CELL_SOM/v"/>
            <OutputColumn id="v_SOM_L23_1_CELL_SOM_v" quantity="SOM_L23/1/CELL_SOM/v"/>
            <OutputColumn id="v_SOM_L23_2_CELL_SOM_v" quantity="SOM_L23/2/CELL_SOM/v"/>
            <OutputColumn id="v_SOM_L23_3_CELL_SOM_v" quantity="SOM_L23/3/CELL_SOM/v"/>
            <OutputColumn id="v_SOM_L23_4_CELL_SOM_v" quantity="SOM_L23/4/CELL_SOM/v"/>
            <OutputColumn id="v_SOM_L23_5_CELL_SOM_v" quantity="SOM_L23/5/CELL_SOM/v"/>
            <OutputColumn id="v_SOM_L23_6_CELL_SOM_v" quantity="SOM_L23/6/CELL_SOM/v"/>
        </OutputFile>

        <OutputFile id="Volts_file__PV_L5" fileName="Sim_M1.PV_L5.v.dat">
            <OutputColumn id="v_PV_L5_0_CELL_PV_v" quantity="PV_L5/0/CELL_PV/v"/>
            <OutputColumn id="v_PV_L5_1_CELL_PV_v" quantity="PV_L5/1/CELL_PV/v"/>
            <OutputColumn id="v_PV_L5_2_CELL_PV_v" quantity="PV_L5/2/CELL_PV/v"/>
            <OutputColumn id="v_PV_L5_3_CELL_PV_v" quantity="PV_L5/3/CELL_PV/v"/>
            <OutputColumn id="v_PV_L5_4_CELL_PV_v" quantity="PV_L5/4/CELL_PV/v"/>
            <OutputColumn id="v_PV_L5_5_CELL_PV_v" quantity="PV_L5/5/CELL_PV/v"/>
            <OutputColumn id="v_PV_L5_6_CELL_PV_v" quantity="PV_L5/6/CELL_PV/v"/>
            <OutputColumn id="v_PV_L5_7_CELL_PV_v" quantity="PV_L5/7/CELL_PV/v"/>
            <OutputColumn id="v_PV_L5_8_CELL_PV_v" quantity="PV_L5/8/CELL_PV/v"/>
            <OutputColumn id="v_PV_L5_9_CELL_PV_v" quantity="PV_L5/9/CELL_PV/v"/>
            <OutputColumn id="v_PV_L5_10_CELL_PV_v" quantity="PV_L5/10/CELL_PV/v"/>
            <OutputColumn id="v_PV_L5_11_CELL_PV_v" quantity="PV_L5/11/CELL_PV/v"/>
            <OutputColumn id="v_PV_L5_12_CELL_PV_v" quantity="PV_L5/12/CELL_PV/v"/>
            <OutputColumn id="v_PV_L5_13_CELL_PV_v" quantity="PV_L5/13/CELL_PV/v"/>
            <OutputColumn id="v_PV_L5_14_CELL_PV_v" quantity="PV_L5/14/CELL_PV/v"/>
        </OutputFile>

        <OutputFile id="Volts_file__SOM_L5" fileName="Sim_M1.SOM_L5.v.dat">
            <OutputColumn id="v_SOM_L5_0_CELL_SOM_v" quantity="SOM_L5/0/CELL_SOM/v"/>
            <OutputColumn id="v_SOM_L5_1_CELL_SOM_v" quantity="SOM_L5/1/CELL_SOM/v"/>
            <OutputColumn id="v_SOM_L5_2_CELL_SOM_v" quantity="SOM_L5/2/CELL_SOM/v"/>
            <OutputColumn id="v_SOM_L5_3_CELL_SOM_v" quantity="SOM_L5/3/CELL_SOM/v"/>
            <OutputColumn id="v_SOM_L5_4_CELL_SOM_v" quantity="SOM_L5/4/CELL_SOM/v"/>
            <OutputColumn id="v_SOM_L5_5_CELL_SOM_v" quantity="SOM_L5/5/CELL_SOM/v"/>
            <OutputColumn id="v_SOM_L5_6_CELL_SOM_v" quantity="SOM_L5/6/CELL_SOM/v"/>
            <OutputColumn id="v_SOM_L5_7_CELL_SOM_v" quantity="SOM_L5/7/CELL_SOM/v"/>
            <OutputColumn id="v_SOM_L5_8_CELL_SOM_v" quantity="SOM_L5/8/CELL_SOM/v"/>
            <OutputColumn id="v_SOM_L5_9_CELL_SOM_v" quantity="SOM_L5/9/CELL_SOM/v"/>
            <OutputColumn id="v_SOM_L5_10_CELL_SOM_v" quantity="SOM_L5/10/CELL_SOM/v"/>
            <OutputColumn id="v_SOM_L5_11_CELL_SOM_v" quantity="SOM_L5/11/CELL_SOM/v"/>
            <OutputColumn id="v_SOM_L5_12_CELL_SOM_v" quantity="SOM_L5/12/CELL_SOM/v"/>
            <OutputColumn id="v_SOM_L5_13_CELL_SOM_v" quantity="SOM_L5/13/CELL_SOM/v"/>
            <OutputColumn id="v_SOM_L5_14_CELL_SOM_v" quantity="SOM_L5/14/CELL_SOM/v"/>
        </OutputFile>

        <OutputFile id="Volts_file__PV_L6" fileName="Sim_M1.PV_L6.v.dat">
            <OutputColumn id="v_PV_L6_0_CELL_PV_v" quantity="PV_L6/0/CELL_PV/v"/>
            <OutputColumn id="v_PV_L6_1_CELL_PV_v" quantity="PV_L6/1/CELL_PV/v"/>
            <OutputColumn id="v_PV_L6_2_CELL_PV_v" quantity="PV_L6/2/CELL_PV/v"/>
            <OutputColumn id="v_PV_L6_3_CELL_PV_v" quantity="PV_L6/3/CELL_PV/v"/>
            <OutputColumn id="v_PV_L6_4_CELL_PV_v" quantity="PV_L6/4/CELL_PV/v"/>
            <OutputColumn id="v_PV_L6_5_CELL_PV_v" quantity="PV_L6/5/CELL_PV/v"/>
            <OutputColumn id="v_PV_L6_6_CELL_PV_v" quantity="PV_L6/6/CELL_PV/v"/>
        </OutputFile>

        <OutputFile id="Volts_file__SOM_L6" fileName="Sim_M1.SOM_L6.v.dat">
            <OutputColumn id="v_SOM_L6_0_CELL_SOM_v" quantity="SOM_L6/0/CELL_SOM/v"/>
            <OutputColumn id="v_SOM_L6_1_CELL_SOM_v" quantity="SOM_L6/1/CELL_SOM/v"/>
            <OutputColumn id="v_SOM_L6_2_CELL_SOM_v" quantity="SOM_L6/2/CELL_SOM/v"/>
            <OutputColumn id="v_SOM_L6_3_CELL_SOM_v" quantity="SOM_L6/3/CELL_SOM/v"/>
            <OutputColumn id="v_SOM_L6_4_CELL_SOM_v" quantity="SOM_L6/4/CELL_SOM/v"/>
            <OutputColumn id="v_SOM_L6_5_CELL_SOM_v" quantity="SOM_L6/5/CELL_SOM/v"/>
            <OutputColumn id="v_SOM_L6_6_CELL_SOM_v" quantity="SOM_L6/6/CELL_SOM/v"/>
        </OutputFile>

    </Simulation>

</Lems>
